<?xml version="1.0" encoding="UTF-8"?>
<?xml-stylesheet type="text/xsl" href="http://jsbsim.sourceforge.net/JSBSim.xsl"?>
<fdm_config xmlns:xsi="http://www.w3.org/2001/XMLSchema-instance" name="MF-1000" version="2.0" release="ALPHA" xsi:noNamespaceSchemaLocation="http://jsbsim.sourceforge.net/JSBSim.xsd">
    <fileheader>
        <author> Aeromatic v 0.96 </author>
        <filecreationdate>2021-08-20</filecreationdate>
        <version>$Revision: 1.20 $</version>
        <description> Models a MF-1000. </description>
    </fileheader>
    <!--
  File:     MF-1000.xml
  Inputs:
    name:          MF-1000
    type:          single-engine transonic/supersonic fighter
    max weight:    67131 lb
    wing span:     50 ft
    length:        72 ft
    wing area:     700 sq-ft
    gear type:     tricycle
    castering:
    retractable?:  yes
    # engines:     1
    engine type:   turbine
    engine layout: aft fuselage
    yaw damper?    no

  Outputs:
    wing loading:  95.90 lb/sq-ft
    payload:       20143.8 lbs
    CL-alpha:      3.5 per radian
    CL-0:          0.08
    CL-max:        1
    CD-0:          0.021
    K:             0.12

-->
    <metrics file="FDM/metrics.xml" />
    <mass_balance file="FDM/mass_balance.xml" />
    <ground_reactions file="FDM/ground_reactions.xml" />
    <propulsion>
        <engine file="F135-PW-1000">
            <location unit="IN">
                <x> 804.00 </x>
                <y>   0.00 </y>
                <z>   0.00 </z>
            </location>
            <orient unit="DEG">
                <pitch> 0.00 </pitch>
                <roll>  0.00 </roll>
                <yaw>   0.00 </yaw>
            </orient>
            <feed>0</feed>
            <thruster file="direct">
                <location unit="IN">
                    <x> 804.00 </x>
                    <y>   0.00 </y>
                    <z>   0.00 </z>
                </location>
                <orient unit="DEG">
                    <pitch> 0.00 </pitch>
                    <roll>  0.00 </roll>
                    <yaw>   0.00 </yaw>
                </orient>
            </thruster>
        </engine>
        <tank type="FUEL" number="0">
            <location unit="IN">
                <x> 518.40 </x>
                <y>   0.00 </y>
                <z> -21.60 </z>
            </location>
            <capacity unit="LBS"> 10875.22 </capacity>
            <contents unit="LBS">  5437.62 </contents>
        </tank>
    </propulsion>
    <flight_control name="FCS: MF-1000">
        <channel name="Pitch">
            <summer name="Pitch Trim Sum">
                <input>fcs/elevator-cmd-norm</input>
                <input>fcs/pitch-trim-cmd-norm</input>
                <clipto>
                    <min> -1 </min>
                    <max>  1 </max>
                </clipto>
            </summer>
            <aerosurface_scale name="Elevator Control">
                <input>fcs/pitch-trim-sum</input>
                <range>
                    <min> -0.35 </min>
                    <max>  0.35 </max>
                </range>
                <output>fcs/elevator-pos-rad</output>
            </aerosurface_scale>
            <aerosurface_scale name="elevator normalization">
                <input>fcs/elevator-pos-rad</input>
                <domain>
                    <min> -0.35 </min>
                    <max>  0.35 </max>
                </domain>
                <range>
                    <min> -1 </min>
                    <max>  1 </max>
                </range>
                <output>fcs/elevator-pos-norm</output>
            </aerosurface_scale>
        </channel>
        <channel name="Roll">
            <summer name="Roll Trim Sum">
                <input>fcs/aileron-cmd-norm</input>
                <input>fcs/roll-trim-cmd-norm</input>
                <clipto>
                    <min> -1 </min>
                    <max>  1 </max>
                </clipto>
            </summer>
            <aerosurface_scale name="Left Aileron Control">
                <input>fcs/roll-trim-sum</input>
                <range>
                    <min> -0.35 </min>
                    <max>  0.35 </max>
                </range>
                <output>fcs/left-aileron-pos-rad</output>
            </aerosurface_scale>
            <aerosurface_scale name="Right Aileron Control">
                <input>fcs/roll-trim-sum</input>
                <range>
                    <min> -0.35 </min>
                    <max>  0.35 </max>
                </range>
                <output>fcs/right-aileron-pos-rad</output>
            </aerosurface_scale>
            <aerosurface_scale name="left aileron normalization">
                <input>fcs/left-aileron-pos-rad</input>
                <domain>
                    <min> -0.35 </min>
                    <max>  0.35 </max>
                </domain>
                <range>
                    <min> -1 </min>
                    <max>  1 </max>
                </range>
                <output>fcs/left-aileron-pos-norm</output>
            </aerosurface_scale>
            <aerosurface_scale name="right aileron normalization">
                <input>fcs/right-aileron-pos-rad</input>
                <domain>
                    <min> -0.35 </min>
                    <max>  0.35 </max>
                </domain>
                <range>
                    <min> -1 </min>
                    <max>  1 </max>
                </range>
                <output>fcs/right-aileron-pos-norm</output>
            </aerosurface_scale>
        </channel>
        <channel name="Yaw">
            <summer name="Rudder Command Sum">
                <input>fcs/rudder-cmd-norm</input>
                <input>fcs/yaw-trim-cmd-norm</input>
                <clipto>
                    <min> -1 </min>
                    <max>  1 </max>
                </clipto>
            </summer>
            <aerosurface_scale name="Rudder Control">
                <input>fcs/rudder-command-sum</input>
                <range>
                    <min> -0.35 </min>
                    <max>  0.35 </max>
                </range>
                <output>fcs/rudder-pos-rad</output>
            </aerosurface_scale>
            <aerosurface_scale name="rudder normalization">
                <input>fcs/rudder-pos-rad</input>
                <domain>
                    <min> -0.35 </min>
                    <max>  0.35 </max>
                </domain>
                <range>
                    <min> -1 </min>
                    <max>  1 </max>
                </range>
                <output>fcs/rudder-pos-norm</output>
            </aerosurface_scale>
        </channel>
        <channel name="Flaps">
            <kinematic name="Flaps Control">
                <input>fcs/flap-cmd-norm</input>
                <traverse>
                    <setting>
                        <position>  0 </position>
                        <time>      0 </time>
                    </setting>
                    <setting>
                        <position> 15 </position>
                        <time>      4 </time>
                    </setting>
                    <setting>
                        <position> 30 </position>
                        <time>      3 </time>
                    </setting>
                </traverse>
                <output>fcs/flap-pos-deg</output>
            </kinematic>
            <aerosurface_scale name="flap normalization">
                <input>fcs/flap-pos-deg</input>
                <domain>
                    <min>  0 </min>
                    <max> 30 </max>
                </domain>
                <range>
                    <min> 0 </min>
                    <max> 1 </max>
                </range>
                <output>fcs/flap-pos-norm</output>
            </aerosurface_scale>
        </channel>
        <channel name="Landing Gear">
            <kinematic name="Gear Control">
                <input>gear/gear-cmd-norm</input>
                <traverse>
                    <setting>
                        <position> 0 </position>
                        <time>     0 </time>
                    </setting>
                    <setting>
                        <position> 1 </position>
                        <time>     5 </time>
                    </setting>
                </traverse>
                <output>gear/gear-pos-norm</output>
            </kinematic>
        </channel>
        <channel name="Speedbrake">
            <kinematic name="Speedbrake Control">
                <input>fcs/speedbrake-cmd-norm</input>
                <traverse>
                    <setting>
                        <position> 0 </position>
                        <time>     0 </time>
                    </setting>
                    <setting>
                        <position> 1 </position>
                        <time>     1 </time>
                    </setting>
                </traverse>
                <output>fcs/speedbrake-pos-norm</output>
            </kinematic>
        </channel>
    </flight_control>
    <aerodynamics file="FDM/aerodynamics.xml" />
    <external_reactions />
</fdm_config>
